// COMSOL Multiphysics 6.2.0.415 model "Untitled.mph"
// Outline of the model tree

Parameters
  L = 1[m]  // Length
  W = 0.0254[m]  // Width
  H = W  // Height
  F_Ly = 1000[N]  // Applied Force
  EI_1 = 1000[Pa*m^4]  // Flexural Rigidity
  mu_1 = 1[kg/m]  // Linear Mass Density
  EI_2 = 5000[Pa*m^4]  // Flexural Rigidity
  mu_2 = 3[kg/m]  // Linear Mass Density
  I = (H^2/12)*(W*H)  // Moment of Inertia
  E1 = EI_1/I  // Young's Modulus
  E2 = EI_2/I  // Young's Modulus
  rho1 = mu_1*L/(L*W*H)  // Density
  rho2 = mu_2*L/(L*W*H)  // Density

Common definitions
  mpf1: ParticipationFactors

Geometry
  geom1 "Geometry 1" (2D, length unit m)
    r1: Rectangle | size = {L/2, H}
    r2: Rectangle | pos = {L/2, 0}; size = {L/2, H}
    fin: Finalize "Form Union"

Materials
  mat1: Common "Material 1" on domains 1
    def "Basic"
      density = rho1
      youngsmodulus = E1
      poissonsratio = 0
  mat2: Common "Material 2" on domains 2
    def "Basic"
      density = rho1
      poissonsratio = 0
      youngsmodulus = E1

Physics
  solid: SolidMechanics on all domains
    dependent variable u = {u, v, w}
    d.d = H
    lemm1: LinearElasticModel "Linear Elastic Material 1" (default)
    free1: Free (default)
    init1: init "Initial Values 1" (default)
    fix1: Fixed "Fixed Constraint 1" on boundaries 1
    bndl1: BoundaryLoad on boundaries 7 | LoadType = TotalForce; Ftot = {0, F_Ly, 0}

Mesh
  mesh1 "Mesh 1"
    size: MeshSizeDefault | hmax = 0.067; hmin = 3.0E-4; hcurve = 0.3; hgrad = 1.3
    edg1: Edge on boundaries 2, 3, 5, 6
      dis1: Distribution on boundaries 2, 3, 5, 6 | numelem = 20
    map1: Map "Mapped 1" on remaining entities

Studies
  std1 "Study 1"
    eig: Eigenfrequency | shift = 1[Hz]; chkeigregion = on; conrad = 1; conradynhm = 1

Solver configurations
  sol1 "Solution 1" (study std1)
    v1: Variables "Dependent Variables 1"
    e1: Eigenvalue "Eigenvalue Solver 1" | rtol = 1.0E-15; eigvfunscale = maximum; eigvfunscaleparam = 1.0E-6
      dDef: Direct

Datasets
  dset1: Solution | solution = sol1
  cln1: CutLine2D | data = dset1; genpoints = {{0, H/2}, {L, H/2}}

Evaluation groups
  std1EvgFrq: EvaluationGroup "Eigenfrequencies (Study 1)" | data = dset1
    gev1: EvalGlobal "Global Evaluation 1"
      expr = {2*pi*freq, imag(freq)/abs(freq), abs(freq)/imag(freq)/2}
      unit = {rad/s, 1, 1}
      descr = {Angular frequency, Damping ratio, Quality factor}
  std1mpf1: EvaluationGroup "Participation Factors (Study 1)" | data = dset1
    gev1: EvalGlobal "Global Evaluation 1"
      expr = {mpf1.pfLnormX, mpf1.pfLnormY, mpf1.pfLnormZ, mpf1.pfRnormX, mpf1.pfRnormY, mpf1.pfRnormZ, mpf1.mEffLX, mpf1.mEffLY, mpf1.mEffLZ, mpf1.mEffRX, mpf1.mEffRY, mpf1.mEffRZ}
      unit = {1, 1, 1, 1, 1, 1, kg, kg, kg, kg*m^2, kg*m^2, kg*m^2}
      descr = {"Participation factor, normalized, X-translation", "Participation factor, normalized, Y-translation", "Participation factor, normalized, Z-translation", "Participation factor, normalized, X-rotation", "Participation factor, normalized, Y-rotation", "Participation factor, normalized, Z-rotation", "Effective modal mass, X-translation", "Effective modal mass, Y-translation", "Effective modal mass, Z-translation", "Effective modal mass, X-rotation", "Effective modal mass, Y-rotation", "Effective modal mass, Z-rotation"}

Plots
  pg1: PlotGroup2D "Mode Shape (solid)" | data = dset1
    surf1: Surface | expr = solid.disp
      def: Deform "Deformation" | expr = {u, v}; descr = Displacement field
  pg2: PlotGroup1D "1D Plot Group 2" | data = cln1
    lngr1: LineGraph | expr = v; descr = Displacement field, Y-component

Exports
  data1: Data
    data = cln1
    expr = v
    descr = Displacement field, Y-component
    filename = C:\Users\tsf44\Documents\Untitled.txt