// COMSOL Multiphysics 6.1.0.357 model "CantileverBeam_Success.mph"
// Outline of the model tree
// Components: comp1 "Component 1", comp2 "Component 2"

Parameters
  L = 1[m]
  W = 0.0254[m]
  H = W
  F_Ly = 1000[N]
  EI = 1000[Pa*m^4]
  mu = 1[kg/m]

Common definitions
  mpf1: ParticipationFactors [comp1]
  mpf2: ParticipationFactors [comp2]

Geometry
  geom1 "Geometry 1" [comp1] (2D, length unit m)
    r1: Rectangle | size = {L, H}
    fin: Finalize "Form Union"
  geom2 "Geometry 2" [comp2] (2D, length unit m)
    r1: Rectangle | size = {0.165, H}
    r2: Rectangle | pos = {0.165, 0}; size = {0.0045, H}
    r3: Rectangle | pos = {0.1695, 0}; size = {0.001, H}
    r4: Rectangle | pos = {0.1705, 0}; size = {0.0045, H}
    r5: Rectangle | pos = {0.1750, 0}; size = {0.12, H}
    r6: Rectangle | pos = {0.2950, 0}; size = {0.0045, H}
    r7: Rectangle | pos = {0.2995, 0}; size = {0.001, H}
    r8: Rectangle | pos = {0.3005, 0}; size = {0.0045, H}
    r9: Rectangle | pos = {0.3050, 0}; size = {0.19, H}
    r10: Rectangle | pos = {0.495, 0}; size = {0.0045, H}
    r11: Rectangle | pos = {0.4995, 0}; size = {0.001, H}
    r12: Rectangle | pos = {0.5005, 0}; size = {0.0045, H}
    r13: Rectangle | pos = {0.5050, 0}; size = {0.495, H}
    fin: Finalize "Form Union"

Materials
  mat1: Common "Material 1_1.00 EI"
    def "Basic"
      density = mu*L/(L*W*H)
      poissonsratio = 0
      youngsmodulus = EI*(12/(W*H^3))
  matlnk1: Link "Material Link 1" [comp1] on all domains
  mat2: Common "Material 1_0.95 EI"
    def "Basic"
      density = mu*L/(L*W*H)
      poissonsratio = 0
      youngsmodulus = 0.95*EI*(12/(W*H^3))
  mat3: Common "Material 1_0.90 EI"
    def "Basic"
      density = mu*L/(L*W*H)
      poissonsratio = 0
      youngsmodulus = 0.90*EI*(12/(W*H^3))
  mat4: Common "Material 1_0.75 EI"
    def "Basic"
      density = mu*L/(L*W*H)
      poissonsratio = 0
      youngsmodulus = 0.75*EI*(12/(W*H^3))
  matlnk2: Link "Material Link 2" [comp2] on domains 1, 2, 4-6, 8-10, 12, 13
  matlnk3: Link "Material Link 3" [comp2] on domains 3, 7, 11 | link = mat4

Physics
  solid: SolidMechanics [geom1] on all domains
    dependent variable u = {u, v, w}
    d.d = H
    lemm1: LinearElasticModel "Linear Elastic Material 1" (default)
    free1: Free (default)
    init1: init "Initial Values 1" (default)
    fix1: Fixed "Fixed Constraint 1" on boundaries 1
    bndl1: BoundaryLoad on boundaries 4 | LoadType = TotalForce; Ftot = {0, F_Ly, 0}
  solid2: SolidMechanics [geom2] on all domains
    dependent variable u2 = {u2, v2, w2}
    d.d = H
    lemm1: LinearElasticModel "Linear Elastic Material 1" (default)
    free1: Free (default)
    init1: init "Initial Values 1" (default)
    fix1: Fixed "Fixed Constraint 1" on boundaries 1
    bndl1: BoundaryLoad on boundaries 40 | LoadType = TotalForce; Ftot = {0, F_Ly, 0}

Mesh
  mesh1 "Mesh 1" [geom1]
    size: MeshSizeDefault | hmax = 0.067; hmin = 3.0E-4; hcurve = 0.3; hgrad = 1.3
    edg1: Edge on no boundaries
      dis1: Distribution on all boundaries | numelem = 20
    map1: Map "Mapped 1" on remaining entities
  mesh2 "Mesh 2" [geom2]
    size: MeshSizeDefault | hmax = 0.067; hmin = 3.0E-4; hcurve = 0.3; hgrad = 1.3
    edg1: Edge on boundaries 2, 3, 5, 6, 8, 9, 11, 12, 14, 15, 17, 18, 20, 21, 23, 24, 26, 27, 29, 30, 32, 33, 35, 36, 38, 39
      dis1: Distribution on boundaries 2, 3, 5, 6, 8, 9, 11, 12, 14, 15, 17, 18, 20, 21, 23, 24, 26, 27, 29, 30, 32, 33, 35, 36, 38, 39
        numelem = 7
    map1: Map "Mapped 1" on remaining entities

Studies
  std1 "Study 1 - Healthy"
    eig: Eigenfrequency | shift = 1[Hz]; conrad = 1; linpsolnum = auto; solve for = {solid}
  std2 "Study 2 - Damaged"
    eig: Eigenfrequency | shift = 1[Hz]; conrad = 1; linpsolnum = auto; solve for = {solid2}

Solver configurations
  sol1 "Solution 1" (study std1)
    v1: Variables "Dependent Variables 1"
    e1: Eigenvalue "Eigenvalue Solver 1" | rtol = 1.0E-15; eigvfunscale = maximum; eigvfunscaleparam = 1.0E-6
      dDef: Direct
  sol2 "Solution 2" (study std2)
    // same settings as sol1

Datasets
  dset1: Solution | solution = sol1
  cln1: CutLine2D | data = dset1; genpoints = {{0, H/2}, {L, H/2}}
  dset2: Solution | solution = sol2
  dset3: Solution | solution = sol2
  cln2: CutLine2D | data = dset3; genpoints = {{0, H/2}, {L, H/2}}

Evaluation groups
  std1EvgFrq: EvaluationGroup "Eigenfrequencies (Study 1)" | data = dset1
    gev1: EvalGlobal "Global Evaluation 1"
      expr = {2*pi*freq, imag(freq)/abs(freq), abs(freq)/imag(freq)/2}
      unit = {rad/s, 1, 1}
      descr = {Angular frequency, Damping ratio, Quality factor}
  std1mpf1: EvaluationGroup "Participation Factors (Study 1)" | data = dset1
    gev1: EvalGlobal "Global Evaluation 1"
      expr = {mpf1.pfLnormX, mpf1.pfLnormY, mpf1.pfLnormZ, mpf1.pfRnormX, mpf1.pfRnormY, mpf1.pfRnormZ, mpf1.mEffLX, mpf1.mEffLY, mpf1.mEffLZ, mpf1.mEffRX, mpf1.mEffRY, mpf1.mEffRZ}
      unit = {1, 1, 1, 1, 1, 1, kg, kg, kg, kg*m^2, kg*m^2, kg*m^2}
      descr = {"Participation factor, normalized, X-translation", "Participation factor, normalized, Y-translation", "Participation factor, normalized, Z-translation", "Participation factor, normalized, X-rotation", "Participation factor, normalized, Y-rotation", "Participation factor, normalized, Z-rotation", "Effective modal mass, X-translation", "Effective modal mass, Y-translation", "Effective modal mass, Z-translation", "Effective modal mass, X-rotation", "Effective modal mass, Y-rotation", "Effective modal mass, Z-rotation"}
  std2EvgFrq: EvaluationGroup "Eigenfrequencies (Study 2 - Damaged)" | data = dset3
    gev1: EvalGlobal "Global Evaluation 1"
      expr = {2*pi*freq, imag(freq)/abs(freq), abs(freq)/imag(freq)/2}
      unit = {rad/s, 1, 1}
      descr = {Angular frequency, Damping ratio, Quality factor}
  std2mpf1: EvaluationGroup "Participation Factors (Study 2 - Damaged)" | data = dset2
    gev1: EvalGlobal "Global Evaluation 1"
      expr = {mpf1.pfLnormX, mpf1.pfLnormY, mpf1.pfLnormZ, mpf1.pfRnormX, mpf1.pfRnormY, mpf1.pfRnormZ, mpf1.mEffLX, mpf1.mEffLY, mpf1.mEffLZ, mpf1.mEffRX, mpf1.mEffRY, mpf1.mEffRZ}
      unit = {1, 1, 1, 1, 1, 1, kg, kg, kg, kg*m^2, kg*m^2, kg*m^2}
      descr = {"Participation factor, normalized, X-translation", "Participation factor, normalized, Y-translation", "Participation factor, normalized, Z-translation", "Participation factor, normalized, X-rotation", "Participation factor, normalized, Y-rotation", "Participation factor, normalized, Z-rotation", "Effective modal mass, X-translation", "Effective modal mass, Y-translation", "Effective modal mass, Z-translation", "Effective modal mass, X-rotation", "Effective modal mass, Y-rotation", "Effective modal mass, Z-rotation"}
  std2mpf2: EvaluationGroup "Participation Factors (Study 2 - Damaged) 1" | data = dset3
    gev1: EvalGlobal "Global Evaluation 1"
      expr = {mpf2.pfLnormX, mpf2.pfLnormY, mpf2.pfLnormZ, mpf2.pfRnormX, mpf2.pfRnormY, mpf2.pfRnormZ, mpf2.mEffLX, mpf2.mEffLY, mpf2.mEffLZ, mpf2.mEffRX, mpf2.mEffRY, mpf2.mEffRZ}
      unit = {1, 1, 1, 1, 1, 1, kg, kg, kg, kg*m^2, kg*m^2, kg*m^2}
      descr = {"Participation factor, normalized, X-translation", "Participation factor, normalized, Y-translation", "Participation factor, normalized, Z-translation", "Participation factor, normalized, X-rotation", "Participation factor, normalized, Y-rotation", "Participation factor, normalized, Z-rotation", "Effective modal mass, X-translation", "Effective modal mass, Y-translation", "Effective modal mass, Z-translation", "Effective modal mass, X-rotation", "Effective modal mass, Y-rotation", "Effective modal mass, Z-rotation"}

Plots
  pg1: PlotGroup2D "Mode Shape (solid)" | data = dset1
    surf1: Surface | expr = solid.disp
      def: Deform "Deformation" | expr = {u, v}; descr = Displacement field
  pg2: PlotGroup1D "Mode Shapes - Healthy" | data = cln1
    lngr1: LineGraph | expr = v; descr = Displacement field, Y-component
  pg3: PlotGroup2D "Mode Shape (solid2)" | data = dset3
    surf1: Surface | expr = solid2.disp
      def: Deform "Deformation" | expr = {u2, v2}; descr = Displacement field
  pg4: PlotGroup1D "Mode Shapes - Damaged" | data = cln2
    lngr1: LineGraph | expr = v2; descr = Displacement field, Y-component
  pg7: PlotGroup1D "Mode Shape Comparison - Healthy vs. Damaged" | data = none
    lngr1: LineGraph | data = cln1; expr = v; unit = µm; descr = Displacement field, Y-component
    lngr2: LineGraph | data = cln2; expr = v2; unit = µm; descr = Displacement field, Y-component

Exports
  data1: Data "Modes (Healthy)"
    data = cln1
    expr = v
    unit = m
    descr = Displacement field, Y-component
    filename = C:\Users\tsf44\Documents\Modes_Cantilever Beam_Healthy.txt
  data2: Data "Modes (Damaged_All 0.75EI)"
    data = cln2
    expr = v2
    unit = m
    descr = Displacement field, Y-component
    filename = C:\Users\tsf44\Documents\Modes_Cantilever Beam_Damaged.txt